#Lammps 2009 input file generate by DFF

units          real
atom_style     charge
boundary       p p p

read_data      lammps.data
#read_restart       add.rst

pair_style      reax/c NULL
#pair_style      reax/c NULL lgvdw yes

#----Neighbor Section----#
neighbor                1.0 bin
neigh_modify    delay 0 every 10 check no

#read_data      input.data
pair_coeff      * * ffield Al Ca O H C

compute         reax all pair reax/c

variable eb     equal c_reax[1]
variable ea     equal c_reax[2]
variable elp    equal c_reax[3]
variable emol   equal c_reax[4]
variable ev     equal c_reax[5]
variable epen   equal c_reax[6]
variable ecoa   equal c_reax[7]
variable ehb    equal c_reax[8]
variable et     equal c_reax[9]
variable eco    equal c_reax[10]
variable ew     equal c_reax[11]
variable ep     equal c_reax[12]
variable efi    equal c_reax[13]
variable eqeq   equal c_reax[14]

fix             QEQ all qeq/reax 1 0.0 10.0 1.0e-6 reax/c

thermo         1
thermo_style    custom step etotal ke pe temp press vol v_eb v_ea v_elp v_emol v_ev v_epen v_ecoa v_ehb v_et v_eco v_ew v_ep v_efi v_eqeq
thermo_modify   line multi
log            log.sim

min_style       cg
#minimize        1.0e-4 1.0e-6 1 1
#minimize        1.0e-4 1.0e-6 100 1000
minimize        0 1.0e-8 1000 1000

fix            9 all reax/c/bonds 1 bonds.reax
dump                    1 all custom 1 dump.lmp id type x y z vx vy vz
dump_modify             1 sort id
run             0
write_data     out.data
